// SBML level 2 version 4

model P53()

  // Compartments:
  compartment default = 1 volume;
  compartment membrana in default = 1 volume;
  compartment nucleo in membrana = 1 volume;

  // Species:
  substanceOnly species EGFR in membrana = 10;
  substanceOnly species EGF in membrana = 10;
  species EGF_EGFR in membrana = 0; EGF_EGFR is "EGF-EGFR";
  substanceOnly species s4 in membrana = 40; s4 is "AKT";
  species s5 in membrana = 0; s5 is "AKT*";
  substanceOnly species s6 in nucleo = 20; s6 is "P53";
  substanceOnly species s7 in nucleo = 0; s7 is "P53*";
  substanceOnly species MDM2_membrana in membrana = 5;
  species MDM2_nucleo in nucleo = 0; MDM2_nucleo is "MDM2*";

  // Reactions:
  re1: EGF + EGFR => EGF_EGFR; EGF*EGFR*re1_k1 - re1_k2*EGF_EGFR;
    re1_k1 = 0.4 substance; re1_k2 = 0.01 substance;
  re2: s4 -> s5; s4*re2_k1*EGF_EGFR - re2_k2*s5;  // modifiers: EGF_EGFR
    re2_k1 = 0.025 substance; re2_k2 = 0.1 substance;
  re4: MDM2_membrana -> MDM2_nucleo; MDM2_membrana*re4_k1*s5 - MDM2_nucleo*re4_k2;  // modifiers: s5
    re4_k1 = 0.1 substance; re4_k2 = 0.1 substance;
  re5: s7 => s6; s7*re5_k1*MDM2_nucleo;  // modifiers: MDM2_nucleo
    re5_k1 = 0.5 substance;
  re8: s7 => MDM2_membrana; s7*re8_k1;
    re8_k1 = 0.1 substance;
  re9: s6 => s7; s6*re9_k1;
    re9_k1 = 5 substance;

  // Unit definitions:
  unit substance = mole;
  unit volume = litre;
  unit area = metre^2;
  unit length = metre;
  unit time = second;
end
