// SBML level 2 version 4

model TNF_alfa()

  // Compartments:
  compartment default = 1 volume;
  compartment membrana in default = 1 volume;
  compartment nucleo in membrana = 1 volume;

  // Species:
  substanceOnly species TNFR in membrana = 50;
  substanceOnly species s3 in membrana = 100; s3 is "IKK";
  substanceOnly species s4 in membrana = 100; s4 is "NFkB";
  species s5 in membrana = 0; s5 is "NFkB*";
  species s6 in membrana = 0; s6 is "IKK*";
  substanceOnly species s7 in nucleo = 100; s7 is "IkB";
  species s8 in nucleo = 0; s8 is "IkB*";
  species TNFa_TNFR in membrana = 0; TNFa_TNFR is "TNFa-TNFR";
  substanceOnly species TNF_alfa in membrana = 50;

  // Reactions:
  re2: s4 -> s5; s4*re2_k1*s6 - s5*re2_k2*s8;  // modifiers: s6, s8
    re2_k1 = 0.1 substance; re2_k2 = 0.1 substance;
  re5: TNF_alfa + TNFR => TNFa_TNFR; TNF_alfa*TNFR*re5_k1 - TNFa_TNFR*re5_k2;
    re5_k1 = 0.01 substance; re5_k2 = 0.005 substance;
  re7: s3 -> s6; re7_k1*s3*TNFa_TNFR - re7_k2*s6;  // modifiers: TNFa_TNFR
    re7_k1 = 0.01 substance; re7_k2 = 0.05 substance;
  re8: s8 -> s7; k1*s7*s5 - k2*s8;  // modifiers: s5

  // Unit definitions:
  unit substance = mole;
  unit volume = litre;
  unit area = metre^2;
  unit length = metre;
  unit time = second;
end
